Given
integral(U_m^2*sin(ω*t)^2/R, t = 0 .. T) == integral(U_deist^2/R, t = 0 .. T)
F(T, R, ω) := Find(U_deist)[0] simplify → U_m*sqrt(2*T*ω - sin(2*T*ω))/(2*sqrt(T)*sqrt(ω))  # error: Эта переменная неопределена.
F(T, R, ω) simplify → U_m*sqrt(2*T*ω - sin(2*T*ω))/(2*sqrt(T)*sqrt(ω))
ω := 1
T := π
F(2*π, R, ω) simplify → sqrt(2)*U_m/2
