T := 1
B(s) := 20 + (20 + 2*T)*s + 10*T^2*s^2
A(s) := T*s + (5*T^2 + 2*T)*s^2 + 10*T^2*s^3
W(s) := B(s)/A(s)
C(s) := A(s) + B(s)
A(s) → 10*s^3 + 7*s^2 + s
Wz(s) := B(s)/C(s)
h1(t) := W(s)/s invlaplace, s; float, 3 → 20.0*t + 133.0*e^(-0.2*t) + (-15.3*(e^(-0.2*t))^(5/2)) - 118.0
Wz(s) → (10*s^2 + 22*s + 20)/(10*s^3 + 17*s^2 + 23*s + 20)
W(s) → (10*s^2 + 22*s + 20)/(10*s^3 + 7*s^2 + s)
h1(t) := h1(t)*Φ(t)
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p := A(s) solve, s; float, 6 → [0; -0.5; -0.2]
pz := C(s) solve, s; float, 6 → [-1.18406; -0.257968 + 1.27379i; -0.257968 - 1.27379i]
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p1 := B(s) solve, s; float, 6 → [-1.1 + 0.888819i; -1.1 - 0.888819i]
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W(s) → (10*s^2 + 22*s + 20)/(10*s^3 + 7*s^2 + s)
C(ω) := W(1j*ω)
P(ω) := Re(C(ω))
ω := 0, 0.01 .. 100
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h(t) := W(s)/s invlaplace, s; float, 3 → 20.0*t + 133.0*e^(-0.2*t) + (-15.3*(e^(-0.2*t))^(5/2)) - 118.0
