T := 1
B(s) := 20 + (20 + 2*T)*s + 10*T^2*s^2
A(s) := T*s + (5*T^2 + 2*T)*s^2 + 10*T^2*s^3
W(s) := B(s)/A(s)
C(s) := A(s) + B(s)
a1 := 0.2
a2 := 0.5
T1 := 5
T2 := 2
Wz(s) := B(s)/C(s)
f1(t) := (e^(-a1*t) - e^(-a2*t))/(T2 - T1)
Wz(s) → (10*s^2 + 22*s + 20)/(10*s^3 + 17*s^2 + 23*s + 20)
W(s) → (10*s^2 + 22*s + 20)/(10*s^3 + 7*s^2 + s)
f2(t) := 1 + T2*e^(-a2*t)/(T1 - T2) - T1*e^(-a1*t)/(T1 - T2)
f3(t) := t - T1 - T2 - T2^2*e^(-a2*t)/(T1 - T2) + T1^2*e^(-a1*t)/(T1 - T2)
h1(t) := W(s)/s invlaplace, s; float, 3 → 20.0*t + 133.0*e^(-0.2*t) + (-15.3*(e^(-0.2*t))^(5/2)) - 118.0
h(t) := 10*f1(t) + 22*f2(t) + 20*f3(t)
h(t) := h(t)*Φ(t)
ε := 0.01
h1(t) := h1(t)*Φ(t)
δ(t) := (0 ≤ t ≤ ε)/ε
δ(t) := (0 ≤ t ≤ ε)/ε
w(t) := W(s) invlaplace, s; float, 3 → -26.7*e^(-0.2*t) + 7.67*(e^(-0.2*t))^(5/2) + 20.0
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w(t) := w(t)*Φ(t)
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