# Критерий устойчивости Михайлова и Найквиста
ε := 0.9
T := -1
T1 := T + ε
T2 := T - ε
B(s) := 20 + (20 + 2*T)*s + 10*T^2*s^2
B1(s) := 20 + (20 + 2*T1)*s + 10*T1^2*s^2
B2(s) := 20 + (20 + 2*T2)*s + 10*T2^2*s^2
A(s) := T*s + (5*T^2 + 2*T)*s^2 + 10*T^2*s^3
A1(s) := T1*s + (5*T1^2 + 2*T1)*s^2 + 10*T1^2*s^3
A2(s) := T2*s + (5*T2^2 + 2*T2)*s^2 + 10*T2^2*s^3
W(s) := B(s)/A(s)
C(s) := A(s) + B(s)
Wz(s) := B(s)/C(s)
W2(s) := B2(s)/A2(s) → (36.1*s^2 + 16.2*s + 20)/(-1.9*s + 36.1*s^3 + 14.25*s^2)
W1(s) := B1(s)/A1(s) → (19.8*s + 0.1*s^2 + 20)/(-0.1*s + (-0.15*s^2) + 0.1*s^3)
W(s) → (10*s^2 + 18*s + 20)/(10*s^3 + 3*s^2 - s)
C1(s) := A1(s) + B1(s)
C2(s) := A2(s) + B2(s)
Wz(s) → (10*s^2 + 18*s + 20)/(10*s^3 + 13*s^2 + 17*s + 20)
ε1 := 0.5
A3(s) := A(s) + ε1
A4(s) := A(s) - ε1
p := A(s) solve, s; float, 6 → [0; -0.5; 0.2]
pz := C(s) solve, s; float, 6 → [-1.23488; -0.0325588 + 1.27221i; -0.0325588 - 1.27221i]
w := 0, 0.001 .. 100
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T := 1
B(s) := 20 + (20 + 2*T)*s + 10*T^2*s^2
A(s) := T*s + (5*T^2 + 2*T)*s^2 + 10*T^2*s^3
W(s) := B(s)/A(s)
z := B(s) solve, s; float, 6 → [-1.1 + 0.888819i; -1.1 - 0.888819i]
p := A(s) solve, s; float, 6 → [0; -0.5; -0.2]
W(s) → (10*s^2 + 22*s + 20)/(10*s^3 + 7*s^2 + s)
W1(s) := 20
W3(s) := (1 - s/z[0])*(1 - s/z[1]) simplify → 0.50000019631*s^2 + 1.10000043188*s + 1.0
W4(s) := s^-1
W5(s) := (1 - s/p[1])^-1*(1 - s/p[2])^-1 simplify → 1/(10.0*s^2 + 7.0*s + 1.0)
w := 0, 0.01 .. 100
L(w) := 20*log(|W(1j*w)|)
φ(w) := arg(W(1j*w))*deg^-1
L1(ω) := 20*log(|W1(1j*ω)|)
φ1(ω) := arg(W1(1j*ω))*deg^-1
L2(ω) := 20*log(|W2(1j*ω)|)
φ2(ω) := arg(W2(1j*ω))*deg^-1
L3(ω) := 20*log(|W3(1j*ω)|)
φ3(ω) := arg(W3(1j*ω))*deg^-1
L4(ω) := 20*log(|W4(1j*ω)|)
φ4(ω) := arg(W4(1j*ω))*deg^-1
L5(ω) := 20*log(|W5(1j*ω)|)
φ5(ω) := arg(W5(1j*ω))*deg^-1
Ls(ω) := L1(ω) + L3(ω) + L4(ω) + L5(ω)
φs(ω) := φ1(ω) + φ3(ω) + φ4(ω) + φ5(ω)
ωc := .1
ωc := root(L(ωc), ωc)
ωc = 1.43453
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h(t) := W(s)/s invlaplace, s; float, 4 → 20.0*t + 133.3*e^(-0.2*t) + (-15.33*(e^(-0.2*t))^(5/2)) - 118.0
h(t) := h(t)*Φ(t)
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