rez(c) :=
    "Усечение полинома до cn#0"
    if(|c[n ← last(c)]| > ε, c, rez(submatrix(c, 0, n - 1, 0, 0)))
# Критерий устойчивости Рауса-Гурвица
ε ≡ 10^-6
maG(c) :=
    "Матрица Гурвица"
    for i ∈ 0 .. (m ← last(c) - 1)
        for j ∈ 0 .. m
            k ← m + i - 2*j
            Γ[i, j] ← if(0 ≤ k ≤ m + 1, c[k], 0)
    Γ
miG(c) :=
    "Миноры матрицы Гурвица"
    Γ ← maG(c)
    for i ∈ 0 .. last(c) - 1
        M[i] ← |submatrix(Γ, 0, i, 0, i)|
    M
RaGu(c) :=
    "Критерий Рауса-Гурвица"
    [(M ← miG(c ← rez(c))), (n ← last(c))]
    for i ∈ 1 .. n
        return -1 if c[n]^i*M[i - 1] < -ε
    (|c[0]| ≤ ε) + 2*(n > 1 and |M[n - 2]| ≤ ε and |c[1]| > ε)
# Возвращает:
# -1 - неустойчивость
# 0 - устойчивость
# 1 - апериодическая граница устойчивости (c[0]=0)
# 2 - колебательная граница устойчивости (M[n - 1] == 0 and c[1] ≠ 0)
# 3 - обе границы устойчивости
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Given
e1 == x - e2
e2 == x*W4 + e1*W6 - y
y == e2*W1
F(W1, W4, W6) := Find(y, e1, e2)[0]/x simplify → W1*(W4 + W6)/(W1 + W6 + 1)
W(T, s) := F(-2, 1/(1 + 2*s), 1/(1 + 0.2*T*s + T^2*s^2)) simplify; collect, s → (10.0*T^2*s^2 + s*(2.0*T + 20.0) + 20.0)/(s^2*(5.0*T^2 + 2.0*T) + 10.0*T^2*s^3 + T*s)
W1(T, ξ, s) := (10.0*T^2*s^2 + s*(2.0*T + 20.0) + 20.0)/(10.0*T^2*s^3 + s^2*(5.0*T^2 + 2.0*T) + T*s + ξ)
Wz(T, s) := W(T, s)/(1 + W(T, s)) simplify; collect, s → (10*T^2*s^2 + s*(2*T + 20) + 20)/(10*T^2*s^3 + s^2*(15*T^2 + 2*T) + s*(3*T + 20) + 20)
B(T, s) := numer(W(T, s)) → 10.0*T^2*s^2 + 2.0*T*s + 20.0*s + 20.0
A(T, s) := denom(W(T, s)) collect, s → 10.0*T^2*s^3 + (5.0*T^2 + 2.0*T)*s^2 + 1.0*T*s
Az(T, s) := denom(Wz(T, s)) collect, s → 10.0*T^2*s^3 + (15.0*T^2 + 2.0*T)*s^2 + (3.0*T + 20.0)*s + 20.0
C(T) := A(T, s) coeffs, s → [0; 1.0*T; 5.0*T^2 + 2.0*T; 10.0*T^2]
Cz(T) := Az(T, s) coeffs, s → [20.0; 3.0*T + 20.0; 15.0*T^2 + 2.0*T; 10.0*T^2]
M2(T) := C(T)[1]*C(T)[2] - C(T)[0]*C(T)[3] collect, T → 5.0*T^3 + 2.0*T^2
M2z(T) := Cz(T)[1]*Cz(T)[2] - Cz(T)[0]*Cz(T)[3] collect, T → 45.0*T^3 + 106.0*T^2 + 40.0*T
[T3z; T2z; T1z] := M2z(p) solve, p → [0; -0.471894214477; -1.88366134108]
[T3; T2; T1] := M2(T) solve, T → [0; 0; -0.4]
zz := polyroots(Cz(T3z)) = -1
RaGu(Cz(T2z)) = 2
# Разомкнутая система:
pp := T1  # Замкнутая система:
RaGu(Cz(T1z)) = 2
[pn, pk, h] := [pp - 2, 4, 0.0001]
p := pn, pn + h .. pk
u(p) := RaGu(C(p))
uz(p) := RaGu(Cz(p))
A(pp, s) solve, s → [0; 0.5; -0.5]
uz(pp) = -1
u(-0.3) = -1
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Az(pp, s) solve, s → [-1.05827530002; 0.0291376500109 - 3.43668769427i; 0.0291376500109 + 3.43668769427i]
polyroots(C(pp)) = [-0.5; 0; 0.5]
RaGu(C(pp)) = 3
# Подтверждение КУ Гурвица
T := 1
z := polyroots(C(T)) = [-0.5; -0.2; 0]
ξ := 0
h(t) := W(T, s)/s invlaplace, s; float, 4 → 20.0*t + 133.3*e^(-0.2*t) + (-15.33*(e^(-0.2*t))^(5/2)) - 118.0
hz(t) := Wz(T, s)/s invlaplace, s; float, 4 → 2.0*invlaplace(e^(-arg(s)*1i)*(11*s + 5*s^2 + 10)/(|s|*(23*s + 17*s^2 + 10*s^3 + 20)), s, t)  # error: Эта переменная неопределена.
h(t) := Re(h(t))*Φ(t)
hz(t) := Re(hz(t))*Φ(t)  # error: Эта переменная неопределена.
t := -2, -1.99 .. 100
Φ(0) = 0.5
tyz := 3/0.332339 = 9.02693
h0 := limit(h(t), t → 0) → undefined
ty := 3*T/ξ = 0  # error: Деление на ноль.
hz(ε) =  # error: Эта переменная неопределена.
h(ε) = -0.029999
hz(0) =  # error
hy := limit(h(t), t → ∞) → ∞
h(0) = -0.015
hzy := Wz(T, 0) = 1
Δ := |hy - h0|*5*% float, 3 → 0.05*|-1.0*undefined + ∞|
Cz(T) = [20; 23; 17; 10]
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Δz := 0.05*|1.7| = 0.085
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hz(t) := B(T, s)/(s*Cz(T)[3]*(s - zz[0])*(s - zz[1])*(s - zz[2])) invlaplace, s; float, 4 →  # error: Это значение должно быть матрицей.
