# Параметрическая устойчивость по Михайлову
C(s, p) := p*s + (5*p^2 + 2*p)*s^2 + 10*p^2*s^3
C(1j*w, p) → -w^2*(5*p^2 + 2*p) - 10i*p^2*w^3 + p*w*1i
P(w, p) := Re(C(1j*w, p))
Q(w, p) := Im(C(1j*w, p))
vp := stack(-10, -1.884, -1, -0.2, 1)
p := vp[4] → 1
ε := 0.1
t := 0, 0.01 .. 30
w := 0, 0.001 .. 10
z0 := C(s, vp[0]) solve, s; float, 6 → [0; -0.5; 0.02]
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z1 := C(s, vp[1]) solve, s; float, 6 → [0; -0.5; 0.106157]
z2 := C(s, vp[2]) solve, s; float, 6 → [0; -0.5; 0.2]
z3 := C(s, vp[3]) solve, s; float, 6 → [0; 1.0; -0.5]
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z4 := C(s, vp[4]) solve, s; float, 6 → [0; -0.5; -0.2]
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