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# Частотные характеристики
K := 1
T := 2
ξ := 0.1
W(s) := K/(1 + T*s) → 1/(2*s + 1)
ωc := 1/T
C(ω) := W(1j*ω)
P(ω) := Re(C(ω))
Q(ω) := Im(C(ω))
A(ω) := |C(ω)|
L(ω) := 20*log(|C(ω)|)
φ(ω) := arg(C(ω))*deg^-1
ω := 0, 0.01 .. 100
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Y(s) := T/((1 + T^2*s^2)*(1 + 2*s)) → 2/((4*s^2 + 1)*(2*s + 1))
# Временные характеристики
ε := 0.01
δ(t) := (0 ≤ t ≤ ε)/ε
δ1(t) := (δ(t) - δ(t - ε))/ε
y(t) := Y(s) invlaplace, s; float, 3 → -0.5*cos(0.5*t) + 0.5*e^(-0.5*t) + 0.5*sin(0.5*t)
w1(t) := W(s) invlaplace, s; float, 3 → 0.5*e^(-0.5*t)
h(t) := W(s)/s invlaplace, s; float, 3 → -1.0*e^(-0.5*t) + 1.0
w(t) := w1(t)*Φ(t)
h(t) := h(t)*Φ(t)
ty := 3*T float, 3 → 6.0
t := -5, -4.99 .. 20
∞ = 1e307
h0 := limit(h(t), t → 0) → 0
hy := limit(h(t), t → ∞) → 1.0
h(0) = 0
h(∞) = 1
w0 := limit(w1(t), t → 0) → 0.5
wy := limit(w1(t), t → ∞) → 0.0
w(0) = 0.25
w(∞) = 0
Δ1 := |wy - w0|*5*% float, 3 → 0.025
Δ := |hy - h0|*5*% float, 3 → 0.05
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