K := 1
ξ := 0.1
T1 := 1
T2 := 0.1
T3 := -1
ωc1 := 1/T1
ωc2 := 1/T2
ωc3 := 1/T3
ω := 0, 0.01 .. 100
W1(s) := K/(1 + 2*ξ*T1*s + T1^2*s^2) → 1/(0.2*s + s^2 + 1)
W2(s) := K/(1 + 2*ξ*T2*s + T2^2*s^2) → 1/(0.02*s + 0.01*s^2 + 1)
W3(s) := K/(1 + 2*ξ*T3*s + T3^2*s^2) → 1/(-0.2*s + s^2 + 1)
C1(ω) := W1(1j*ω)
P1(ω) := Re(C1(ω))
Q1(ω) := Im(C1(ω))
A1(ω) := |C1(ω)|
L1(ω) := 20*log(|C1(ω)|)
φ1(ω) := arg(C1(ω))*deg^-1
C2(ω) := W2(1j*ω)
P2(ω) := Re(C2(ω))
Q2(ω) := Im(C2(ω))
A2(ω) := |C2(ω)|
L2(ω) := 20*log(|C2(ω)|)
φ2(ω) := arg(C2(ω))*deg^-1
C3(ω) := W3(1j*ω)
P3(ω) := Re(C3(ω))
Q3(ω) := Im(C3(ω))
A3(ω) := |C3(ω)|
L3(ω) := 20*log(|C3(ω)|)
φ3(ω) := arg(C3(ω))*deg^-1
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ampl := (-20*log(2) - 20*log(ξ)) = 13.9794
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# Âðåìåííûå õàðàêòåðèñòèêè
ε := 0.01
δ(t) := (0 ≤ t ≤ ε)/ε
δ1(t) := (δ(t) - δ(t - ε))/ε
t := -5, -4.99 .. 40
w1(t) := W1(s) invlaplace, s; float, 3 → 0.502i*e^(-(0.1 + 0.995i)*t) - 0.502i*e^(-(0.1 - 0.995i)*t)
w2(t) := W2(s) invlaplace, s; float, 3 → 5.02i*e^(-(1.0 + 9.95i)*t) - 5.02i*e^(-(1.0 - 9.95i)*t)
w3(t) := W3(s) invlaplace, s; float, 3 → 0.502i*e^((0.1 - 0.995i)*t) - 0.502i*e^((0.1 + 0.995i)*t)
h1(t) := W1(s)/(200*s) invlaplace, s; float, 3 → 1.0 - (0.5 - 0.0502i)*e^(-(0.1 - 0.995i)*t) - (0.5 + 0.0502i)*e^(-(0.1 + 0.995i)*t)
h2(t) := W2(s)/(20*s) invlaplace, s; float, 3 → 1.0 - (0.5 - 0.0502i)*e^(-(1.0 - 9.95i)*t) - (0.5 + 0.0502i)*e^(-(1.0 + 9.95i)*t)
h3(t) := W3(s)/(200*s) invlaplace, s; float, 3 → 1.0 - (0.5 + 0.0502i)*e^((0.1 + 0.995i)*t) - (0.5 - 0.0502i)*e^((0.1 - 0.995i)*t)
w1(t) := w1(t)*Φ(t)
h1(t) := h1(t)*Φ(t)
w2(t) := w2(t)*Φ(t)
h2(t) := h2(t)*Φ(t)
ω1 := sqrt(1 - ξ^2)/T1
ω2 := sqrt(1 - ξ^2)/T2
ω3 := sqrt(1 - ξ^2)/T3
w3(t) := w3(t)*Φ(t)
h3(t) := h3(t)*Φ(t)
ty1 := 3*T1/ξ float, 3 → 30.0
ty2 := 3*T2/ξ float, 3 → 3.0
ty3 := 3*T3/ξ float, 3 → -30.0
Δ2 := |K/(ω2*T2^2)|*5*% float, 3 → 0.503
Δ1 := |K/(ω1*T1^2)|*5*% float, 3 → 0.0503
h01 := limit(h1(t), t → 0) → 0
hy1 := limit(h1(t), t → ∞) → 1.0
h02 := limit(h2(t), t → 0) → 0
hy2 := limit(h2(t), t → ∞) → 1.0
Δ2h := |hy2 - h02|*5*% float, 3 → 0.05
Δ1h := |hy1 - h01|*5*% float, 3 → 0.05
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Y(s) := T1/((1 + T1^2*s^2)*(1 + 0.2*s + s^2)) → 1/((s^2 + 1)*(0.2*s + s^2 + 1))
y(t) := Y(s) invlaplace, s; float, 3 → -5.0*cos(t) + 0.00135*sin(t) + 5.0*cos(0.995*t)*e^(-0.1*t) + 0.501*sin(0.995*t)*e^(-0.1*t)
