W(s) := (20 + 22*s + 10*s^2)/(s + 7*s^2 + 10*s^3)
h(t) := W(s)/s invlaplace, s; float, 4 → 20.0*t + 133.3*e^(-0.2*t) + (-15.33*(e^(-0.2*t))^(5/2)) - 118.0
h(t) := h(t)*Φ(t)
t := -5, -4.99 .. 50
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X(t) := Φ(t)*(2*sin(0.2*t + 0.52) - cos(t))
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dt := 0.1
N := 2000
i := 0 .. N
t[i] := dt*i
x[i] := X(t[i])
h[i] := h(t[i])
y[i] := x[0]*h[i] + if(i, sum((x[k] - x[k - 1])*h[i - k], k = 1 .. i), 0)
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