# Задача 1.5
P1 := 0.99
λ2 := 10^-5
T3 := 8100
T4 := 7860
λ5 := 2.5*10^-5
P := 0.92
λ1 := ln(P1)/(-100) = 0.000100503
λ3 := 1/T3 = 0.000123457
λ4 := 1/T4 = 0.000127226
λ := λ1 + λ2 + λ3 + λ4 + λ5 = 0.000386187
t := ln(P)/(-λ) = 215.91
# Задача 1.6
P1 := 0.99
P2 := 0.97
P3 := 0.98
P4 := 0.95
P5 := 0.98
t1 := 100
t2 := 200
t3 := 157
t4 := 350
t5 := 120
t := 625
λ1 := ln(P1)/(-t1) = 0.000100503
λ2 := ln(P2)/(-t2) = 0.000152296
λ3 := ln(P3)/(-t3) = 0.00012868
λ4 := ln(P4)/(-t4) = 0.000146552
λ5 := ln(P5)/(-t5) = 0.000168356
λ := λ1 + λ2 + λ3 + λ4 + λ5 = 0.000696387
P := e^(-λ*t) = 0.647108
T := 1/λ = 1435.98
# Задача 1.7
m := 1000
σ := 250
t := 1200
Φ0(y) := integral(e^(-0.5*x^2), x = 0 .. y)/sqrt(2*π)
p := 0.5 - Φ0((t - m)/σ) float, 4 → 0.2119
t1 := m - 3*σ → 250
t2 := m + 3*σ → 1750
p1 := 0.5 - Φ0((t1 - m)/σ)
p1 float, 4 → 0.9987
p2 := 0.5 - Φ0((t2 - m)/σ)
p2 float, 4 → 0.00135
P := p1 - p2 float, 4 → 0.9973
t3 := 1500
p3 := 0.5 - Φ0((t3 - m)/σ)
p3 float, 4 → 0.02275
P2 := p3/p float, 4 → 0.1074
# Задача 1.8
m := 4000
σ := 1000
Given
0.5 - integral(e^(-0.5*x^2), x = 0 .. (t - m)/σ)/sqrt(2*π) == 0.9
Find(t) float, 6 → 2718.45
t1 := 2000
t2 := 3000
p1 := 0.5 - Φ0((t1 - m)/σ)
p1 float, 4 → 0.9772
p2 := 0.5 - Φ0((t2 - m)/σ)
p2 float, 4 → 0.8413
P := p1 - p2 float, 4 → 0.1359
t3 := 4000
p3 := 0.5 - Φ0((t3 - m)/σ)
p3 float, 4 → 0.5
# Задача 1.4
Γ(α) := integral(x^(α - 1)*e^(-x), x = 0 .. ∞)
I(α, t) := 1/Γ(α)*integral(x^(α - 1)*e^(-x), x = 0 .. t)
Φ0(t) := integral(e^(-0.5*x^2), x = 0 .. t)/sqrt(2*π)
α1 := 10
β1 := 70
λ2 := 5*10^-5
m3 := 375
σ3 := 86
λ4 := 3*10^-5
α5 := 4.8
β5 := 190
P1(t) := 1 - I(α1, t/β1)
P2(t) := e^(-λ2*t)
P3(t) := (0.5 - Φ0((t - m3)/σ3))/(0.5 + Φ0(m3/σ3))
P4(t) := e^(-λ4*t^2)
P5(t) := e^(-(t/β5)^α5)
t := 0, 1 .. 1500
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P(t) := P1(t)*P2(t)*P3(t)*P4(t)*P5(t)
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T := integral(P(t), t = 0 .. ∞) float, 6 → 128.822
f1(t) := t^(α1 - 1)*e^(-t/β1)/(β1^α1*Γ(α1))
f2(t) := λ2*e^(-λ2*t)
f3(t) := e^(-(t - m3)^2/(2*σ3^2))/(σ3*sqrt(2*π)*(0.5 + Φ0(m3/σ3)))
f4(t) := 2*λ4*e^(-λ4*t^2)
f5(t) := α5*t^(α5 - 1)*e^(-(t/β5)^α5)/β1^α1
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λ1(t) := f1(t)/P1(t)
λ2(t) := f2(t)/P2(t)
λ3(t) := f3(t)/P3(t)
λ4(t) := f4(t)/P4(t)
λ5(t) := f5(t)/P5(t)
t := 0, 1 .. 3000
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λ(t) := λ1(t) + λ2(t) + λ3(t) + λ4(t) + λ5(t)
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f(t) := λ(t)/P(t)
t := 0, 1 .. 200
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